*Heading
** Job name: 80-0-UMAT-implicit-S4R-h4 Model name: 80-0-UMAT-implict-S4R
** Generated by: Abaqus/CAE 6.13-1
*Preprint, echo=NO, model=NO, history=NO, contact=NO
**
** PARTS
**
*Part, name=Part-3
*Node
      1,   158.997116,   88.9008408,           0.
      2,   156.038757,   97.3553467,           0.
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*Element, type=S3
  1, 2946, 3274, 3191
  2, 1702, 3991, 1453
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*Element, type=S4R
 145,   42, 1000, 1184, 1272
 146,  581, 1500, 1548, 1657
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** Region: (CompositeLayup-1-1: Generated From Layup)
*Elset, elset=CompositeLayup-1-1, generate
    1,  4491,     1
** Section: CompositeLayup-1-1
*Shell Section, elset=CompositeLayup-1-1, composite, poisson=0.3, layup=CompositeLayup-1
0.158, 3, Material-1, 0., Ply-1
0.158, 3, Material-1, 0., Ply-2
0.158, 3, Material-1, 0., Ply-3
0.158, 3, Material-1, 0., Ply-4
0.158, 3, Material-1, 0., Ply-5
0.158, 3, Material-1, 0., Ply-6
0.158, 3, Material-1, 0., Ply-7
0.158, 3, Material-1, 0., Ply-8
0.158, 3, Material-1, 0., Ply-9
0.158, 3, Material-1, 0., Ply-10
*Transverse Shear
8558., 4792., 0.
*End Part
**
**
** ASSEMBLY
**
*Assembly, name=Assembly
**
*Instance, name=Part-3-1, part=Part-3
*End Instance
**
*Node
      1,         240.,          80.,  0.790000021
*Nset, nset=geometry-fixed, instance=Part-3-1
   67,  131,  132,  133,  134,  135
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*Elset, elset=geometry-fixed, instance=Part-3-1
  204,  206,  240,  241,  243,  424
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*Nset, nset=geometry-load, instance=Part-3-1
   66,   68,   69,   70,   71,   72
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*Elset, elset=geometry-load, instance=Part-3-1
  381,  382,  675,  676,  699,  700
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*Nset, nset=node-fixed, instance=Part-3-1
   67,  131,  132,  133,  134,  135
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*Nset, nset=node-load, instance=Part-3-1
   66,   68,   69,   70,   71,   72
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*Nset, nset=rp
 1,
*Nset, nset=_PickedSet14, internal
 1,
** Constraint: Constraint-1
*Equation
2
node-load, 1, 1.
rp, 1, -1.
*End Assembly
*Amplitude, name=disp-amp, definition=SMOOTH STEP
             0.,              0.,             60.,              1.
**
** MATERIALS
**
*Material, name=Material-1
*Density
1.,
*Depvar
     16,
*User Material, constants=14, unsymm
127700.,   9670.,   6500.,   3640.,     0.3,     0.3, 1451.55,  725.78
     36.,    160.,     60.,      5.,     30.,  0.0005
** ----------------------------------------------------------------
**
** STEP: Step-1
**
*Step, name=Step-1, nlgeom=NO, inc=4000
*Dynamic,application=QUASI-STATIC,initial=NO
0.06,60.,1e-05
**
** BOUNDARY CONDITIONS
**
** Name: fixed end Type: Symmetry/Antisymmetry/Encastre
*Boundary
node-fixed, ENCASTRE
** Name: xload Type: Displacement/Rotation
*Boundary, amplitude=disp-amp
_PickedSet14, 1, 1, 4.
_PickedSet14, 2, 2
_PickedSet14, 3, 3
_PickedSet14, 4, 4
_PickedSet14, 5, 5
_PickedSet14, 6, 6
**
** OUTPUT REQUESTS
**
*Restart, write, number interval=1, time marks=NO
**
** FIELD OUTPUT: F-Output-1
**
*Output, field, frequency=1
*Element Output, elset=Part-3-1.CompositeLayup-1-1, directions=YES
2, 5, 8, 11, 14, 17, 20, 23, 26, 29
E, S, SDV
**
** HISTORY OUTPUT: H-Output-1
**
*Output, history, frequency=1
*Node Output, nset=rp
RF1, U1, U2, U3
*End Step
