*Heading
** Job name: small_hole-0-90 Model name: smallHole-0-90-UMAT-implict-SC8R
** Generated by: Abaqus/CAE 6.13-1
*Preprint, echo=NO, model=NO, history=NO, contact=NO
**
** PARTS
**
*Part, name=Part-2
*Node
      1,           0.,          18.,    2.6400001
      2,         116.,          18.,    2.6400001
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*Element, type=SC8R
   1,  132,  715,   29,    1, 3680, 4263, 3577, 3549
   2,  715,  716,   30,   29, 4263, 4264, 3578, 3577
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** Region: (CompositeLayup-1-1: Generated From Layup)
*Elset, elset=CompositeLayup-1-1, generate
    1,  3390,     1
** Section: CompositeLayup-1-1
*Shell Section, elset=CompositeLayup-1-1, composite, poisson=0.3, thickness modulus=9600., stack direction=3,
layup=CompositeLayup-1
0.165, 3, Material-1, 0., Ply-1
0.165, 3, Material-1, 90., Ply-2
0.165, 3, Material-1, 0., Ply-3
0.165, 3, Material-1, 90., Ply-4
0.165, 3, Material-1, 0., Ply-5
0.165, 3, Material-1, 90., Ply-6
0.165, 3, Material-1, 0., Ply-7
0.165, 3, Material-1, 90., Ply-8
0.165, 3, Material-1, 45., Ply-9
0.165, 3, Material-1, -45., Ply-10
0.165, 3, Material-1, 45., Ply-11
0.165, 3, Material-1, -45., Ply-12
0.165, 3, Material-1, 45., Ply-13
0.165, 3, Material-1, -45., Ply-14
0.165, 3, Material-1, 45., Ply-15
0.165, 3, Material-1, -45., Ply-16
*Transverse Shear
8558., 4792., 0.
*End Part
**
**
** ASSEMBLY
**
*Assembly, name=Assembly
**
*Instance, name=Part-2-1, part=Part-2
*End Instance
**
*Node
      1,         250.,          18.,   1.32000005
*Nset, nset=fixedface, instance=Part-2-1
    1,    4,    5,   14,   15,  124
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*Elset, elset=fixedface, instance=Part-2-1
    1,   45,   89,  133,  177,  221
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*Nset, nset=loadface, instance=Part-2-1
   24,   25,   26,   27,   28,  511
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*Elset, elset=loadface, instance=Part-2-1
 2283, 2284, 2285, 2286, 2287, 2333
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*Nset, nset=node-loadface, instance=Part-2-1
   24,   25,   26,   27,   28,  511
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*Nset, nset=rp
 1,
*Nset, nset=_PickedSet14, internal
 1,
*Elset, elset=_s_Surf-1_S3, internal, instance=Part-2-1, generate
 2283,  2286,     1
*Elset, elset=_s_Surf-1_S6, internal, instance=Part-2-1, generate
 2287,  2701,    46
*Elset, elset=_s_Surf-1_S4, internal, instance=Part-2-1, generate
 2792,  3390,    46
*Surface, type=ELEMENT, name=s_Surf-1
_s_Surf-1_S3, S3
_s_Surf-1_S6, S6
_s_Surf-1_S4, S4
** Constraint: Constraint-1
*Equation
2
node-loadface, 1, 1.
rp, 1, -1.
*End Assembly
*Amplitude, name=disp-amp, definition=SMOOTH STEP
             0.,              0.,             60.,              1.
**
** MATERIALS
**
*Material, name=Material-1
*Density
1.,
*Depvar
     16,
*User Material, constants=14, unsymm
127700.,   9670.,   6500.,   3640.,     0.3,     0.3, 1451.55,  725.78
     36.,    160.,     60.,      5.,     30.,  0.0005
** ----------------------------------------------------------------
**
** STEP: Step-1
**
*Step, name=Step-1, nlgeom=NO, inc=4000
*Dynamic,application=QUASI-STATIC,initial=NO
0.06,60.,1e-05
**
** BOUNDARY CONDITIONS
**
** Name: fixed end Type: Symmetry/Antisymmetry/Encastre
*Boundary
fixedface, ENCASTRE
** Name: xload Type: Displacement/Rotation
*Boundary, amplitude=disp-amp
_PickedSet14, 1, 1, 4.
_PickedSet14, 2, 2
_PickedSet14, 3, 3
_PickedSet14, 4, 4
_PickedSet14, 5, 5
_PickedSet14, 6, 6
**
** OUTPUT REQUESTS
**
*Restart, write, number interval=1, time marks=NO
**
** FIELD OUTPUT: F-Output-1
**
*Output, field, frequency=1
*Element Output, elset=Part-2-1.CompositeLayup-1-1, directions=YES
2, 5, 8, 11, 14, 17, 20, 23, 26, 29, 32, 35, 38, 41, 44, 47
E, S, SDV
**
** HISTORY OUTPUT: H-Output-1
**
*Output, history, frequency=1
*Node Output, nset=rp
RF1, U1, U2, U3
*End Step
