*Heading
** Job name: I-100-45-lin Model name: 100-45-UMAT-implict-SC8R
** Generated by: Abaqus/CAE 6.13-1
*Preprint, echo=NO, model=NO, history=NO, contact=NO
**
** PARTS
**
*Part, name=Part-1
*Node
      1,         210.,           0.,           0.
      2,         210.,           0.,          1.5
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*Element, type=SC8R
  1,  258,  266, 1852, 1481,    1,    2,   34,  138
  2, 1481, 1852, 1853, 1482,  138,   34,   35,  137
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*Nset, nset=geometry-load
    1,    2,    3,    4,    5,    6
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*Elset, elset=geometry-load, generate
   1,  432,    1
*Nset, nset=geometry-fixed
   10,   11,   12,   13,   14,   15
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*Elset, elset=geometry-fixed, generate
 433,  864,    1
*Elset, elset=element-fixed, generate
 433,  864,    1
*Nset, nset=node-fixed
   10,   11,   12,   13,   14,   15
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*Elset, elset=element-load, generate
   1,  432,    1
*Nset, nset=node-load
    1,    2,    3,    4,    5,    6
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** Region: (CompositeLayup-1-1: Generated From Layup), (Controls:EC-1)
*Elset, elset=CompositeLayup-1-1-1
    1,    2,    3,    4,    5,    6
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** Section: CompositeLayup-1-1
*Shell Section, elset=CompositeLayup-1-1-1, composite, controls=EC-1, poisson=0.3, thickness modulus=9600., stack direction=3,
layup=CompositeLayup-1
0.158, 3, Material-1, 45., Ply-1
0.158, 3, Material-1, -45., Ply-2
0.158, 3, Material-1, 45., Ply-3
0.158, 3, Material-1, -45., Ply-4
0.158, 3, Material-1, 45., Ply-5
0.158, 3, Material-1, -45., Ply-6
0.158, 3, Material-1, 45., Ply-7
0.158, 3, Material-1, -45., Ply-8
0.158, 3, Material-1, 45., Ply-9
0.158, 3, Material-1, -45., Ply-10
*Transverse Shear
8558., 4792., 0.
*Hourglass Stiffness
1., , 1., 0.
** Region: (CompositeLayup-1-1: Generated From Layup), (Controls:Default)
*Elset, elset=CompositeLayup-1-1-2, generate
 433,  864,    1
** Section: CompositeLayup-1-1
*Shell Section, elset=CompositeLayup-1-1-2, composite, poisson=0.3, thickness modulus=9600., stack direction=3,
layup=CompositeLayup-1
0.158, 3, Material-1, 45., Ply-1
0.158, 3, Material-1, -45., Ply-2
0.158, 3, Material-1, 45., Ply-3
0.158, 3, Material-1, -45., Ply-4
0.158, 3, Material-1, 45., Ply-5
0.158, 3, Material-1, -45., Ply-6
0.158, 3, Material-1, 45., Ply-7
0.158, 3, Material-1, -45., Ply-8
0.158, 3, Material-1, 45., Ply-9
0.158, 3, Material-1, -45., Ply-10
*Transverse Shear
8558., 4792., 0.
*End Part
**
**
** ASSEMBLY
**
*Assembly, name=Assembly
**
*Instance, name=Part-1-1, part=Part-1
*End Instance
**
*Node
      1,         240.,          80.,         0.75
*Nset, nset=rp
 1,
*Nset, nset=_PickedSet14, internal
 1,
*Elset, elset=_s_Surf-1_S1, internal, instance=Part-1-1, generate
 4387,  4509,     1
*Surface, type=ELEMENT, name=s_Surf-1
_s_Surf-1_S1, S1
** Constraint: Constraint-1
*Equation
2
Part-1-1.node-load, 1, 1.
rp, 1, -1.
*End Assembly
**
** ELEMENT CONTROLS
**
*Section Controls, name=EC-1, hourglass=STIFFNESS, VISCOSITY=1.
1., 1., 1.
*Amplitude, name=disp-amp, definition=SMOOTH STEP
             0.,              0.,             60.,              1.
**
** MATERIALS
**
*Material, name=Material-1
*Density
1.,
*Depvar
     16,
*User Material, constants=14, unsymm
127700.,  9670.,  6500.,  3640.,    0.3,    0.3,  1441.,  764.3
    54.,   160.,    95.,    5.,    60., 0.0005
** ----------------------------------------------------------------
**
** STEP: Step-1
**
*Step, name=Step-1, nlgeom=NO, inc=4000
*Dynamic,application=QUASI-STATIC,initial=NO
0.06,60.,1e-05,0.06
**
** BOUNDARY CONDITIONS
**
** Name: fixed end Type: Symmetry/Antisymmetry/Encastre
*Boundary
Part-1-1.geometry-fixed, ENCASTRE
** Name: xload Type: Displacement/Rotation
*Boundary, amplitude=disp-amp
_PickedSet14, 1, 1, 4.
_PickedSet14, 2, 2
_PickedSet14, 3, 3
_PickedSet14, 4, 4
_PickedSet14, 5, 5
_PickedSet14, 6, 6
**
** OUTPUT REQUESTS
**
*Restart, write, number interval=1, time marks=NO
**
** FIELD OUTPUT: F-Output-1
**
*Output, field, frequency=1
*Element Output, elset=Part-1-1.CompositeLayup-1-1-1, directions=YES
2, 5, 8, 11, 14, 17, 20, 23, 26, 29
E, S, SDV
**
** FIELD OUTPUT: F-Output-1
**
*Element Output, elset=Part-1-1.CompositeLayup-1-1-2, directions=YES
2, 5, 8, 11, 14, 17, 20, 23, 26, 29
E, S, SDV
**
** HISTORY OUTPUT: H-Output-1
**
*Output, history, frequency=1
*Node Output, nset=rp
RF1, U1, U2, U3
*End Step
